# OpenSim document version 30000
Model Mouse_hindlimb:
  length_units: meters
  force_units: N
  gravity: 0 -9.80665 0
  credits:
    Charles, J. P., Cappellari, O., Spence, A. J., Wells, D. J., Hutchinson, J. R
  publications:
    Muscle moment arms and sensitivity analysis of a mouse hindlimb musculoskeletal model. Journal of Anatomy. doi: 10.1111/joa.12461
  defaults: Millard2012AccelerationMuscle default: min_control=0.02 max_control=1 optimal_force=1
      max_isometric_force=10 optimal_fiber_length=0.1 tendon_slack_length=0.1 pennation_angle_at_optimal=0 [radians]
      max_contraction_velocity=12 default_fiber_length=0.1
  BodySet:
    Body ground: mass=0 mass_center=(0 0 0) inertia_xx=0 inertia_yy=0 inertia_zz=0
    Body: mass=0.0195 mass_center=(0.0294 -0.0041 -0.0015) inertia_xx=1.078e-7 inertia_yy=9.436e-7 inertia_zz=9.124e-7
      CustomJoint GroundBody: parent_body=ground location_in_parent=(0 0 0) location=(0 0 0)
        Coordinate GroundBody_Ry: motion_type=rotational default_value=7.977097e-30 range=(-3.141593 3.141593)
            clamped=false locked=true
        Coordinate Pelvic_tilt: motion_type=rotational default_value=0.4658284 range=(-3.141593 3.141593) clamped=false
        Coordinate GroundBody_Rx: motion_type=rotational default_value=-7.087976e-31 range=(-3.141593 3.141593)
            clamped=false locked=true
        Coordinate GroundBody_Tx: motion_type=translational default_value=0 range=(-100 100) clamped=false locked=true
        Coordinate GroundBody_Ty: motion_type=translational default_value=0 range=(-100 100) clamped=false locked=true
        Coordinate GroundBody_Tz: motion_type=translational default_value=0.002491 range=(-100 100) clamped=false
            locked=true
        SpatialTransform:
          TransformAxis rotation1: coordinates=GroundBody_Ry axis=(-0.00599949 0.9999683 0.005241391)
              LinearFunction(coefficients=1 0)
          TransformAxis rotation2: coordinates=Pelvic_tilt axis=(-0.02165402 -0.005370806 0.9997511)
              LinearFunction(coefficients=1 0)
          TransformAxis rotation3: coordinates=GroundBody_Rx axis=(0.9997476 0.005884286 0.02168395)
              LinearFunction(coefficients=1 0)
          TransformAxis translation1: coordinates=GroundBody_Tx axis=(1 0 0) LinearFunction(coefficients=1 0)
          TransformAxis translation2: coordinates=GroundBody_Ty axis=(0 1 0) LinearFunction(coefficients=1 0)
          TransformAxis translation3: coordinates=GroundBody_Tz axis=(0 0 1) LinearFunction(coefficients=1 0)
    Body Pelvis: mass=0.000388 mass_center=(0.0029 -0.0012 0.0024) inertia_xx=2.355e-7 inertia_yy=6.432e-7
        inertia_zz=6.701e-7 meshes=Pelvis.vtp
      CustomJoint PelvisBody: parent_body=Body location_in_parent=(0 0 0) location=(0 0 0)
        Coordinate PelvisBody_Ry: motion_type=rotational default_value=0 range=(-3.141593 3.141593) clamped=false
            locked=true
        Coordinate PelvisBody_Rz: motion_type=rotational default_value=0 range=(-3.141593 3.141593) clamped=false
            locked=true
        Coordinate PelvisBody_Rx: motion_type=rotational default_value=0 range=(-3.141593 3.141593) clamped=false
            locked=true
        Coordinate PelvisBody_Tx: motion_type=translational default_value=0.002491 range=(-100 100) clamped=false
            locked=true
        Coordinate PelvisBody_Ty: motion_type=translational default_value=0 range=(-100 100) clamped=false locked=true
        Coordinate PelvisBody_Tz: motion_type=translational default_value=0 range=(-100 100) clamped=false locked=true
        SpatialTransform:
          TransformAxis rotation1: coordinates=PelvisBody_Ry axis=(-0.00599949 0.9999683 0.005241391)
              LinearFunction(coefficients=1 0)
          TransformAxis rotation2: coordinates=PelvisBody_Rz axis=(-0.02165402 -0.005370806 0.9997511)
              LinearFunction(coefficients=1 0)
          TransformAxis rotation3: coordinates=PelvisBody_Rx axis=(0.9997476 0.005884286 0.02168395)
              LinearFunction(coefficients=1 0)
          TransformAxis translation1: coordinates=PelvisBody_Tx axis=(1 0 0) LinearFunction(coefficients=1 0)
          TransformAxis translation2: coordinates=PelvisBody_Ty axis=(0 1 0) LinearFunction(coefficients=1 0)
          TransformAxis translation3: coordinates=PelvisBody_Tz axis=(0 0 1) LinearFunction(coefficients=1 0)
      WrapCylinder GA_at_Pelvis: xyz_body_rotation=(0.0617847 -0.00610865 -0.938638)
          translation=(-0.0072 -0.0029 -0.0013) quadrant=x radius=0.0025 length=0.005
      WrapSphere ST_at_Pelvis: translation=(-0.0057 -0.0018 0.0006) quadrant=all radius=0.0006
      WrapEllipsoid CF_BFA_at_Pelvis: xyz_body_rotation=(1.72351 -0.713142 2.47348) translation=(-0.0043 -0.001 0.0003)
          quadrant=-y dimensions=(0.0015 0.0005 0.0025)
      WrapEllipsoid OE_at_Pelvis: xyz_body_rotation=(-0.25953 -0.429176 0.902859) translation=(-0.0039 -0.001 0)
          quadrant=-y dimensions=(0.0025 0.0005 0.0015)
      WrapCylinder Hip_flexors_at_pelvis: xyz_body_rotation=(-0.273319 -0.0471239 -1.25454)
          translation=(0.0009 -0.0003 -0.0005) quadrant=x radius=0.0009 length=0.002
    Body Thigh: mass=0.0004411 mass_center=(-0.0028 -0.0072 0.0002) inertia_xx=6.823e-7 inertia_yy=4.236e-7
        inertia_zz=9.107e-7 meshes=Femur.vtp
      CustomJoint Hip: parent_body=Pelvis location_in_parent=(0 0 0) location=(0 0 0)
        Coordinate Hip_rotation: motion_type=rotational default_value=0 range=(-0.1745329 0.5235988) clamped=false
        Coordinate Hip_flexion: motion_type=rotational default_value=-0.7020761 range=(-0.8726646 0.8726646)
            clamped=false
        Coordinate Hip_adduction: motion_type=rotational default_value=-0.4982514 range=(-0.6981317 0.3490659)
            clamped=false
        Coordinate Thigh_Tx: motion_type=translational default_value=0 range=(-100 100) clamped=false locked=true
        Coordinate Thigh_Ty: motion_type=translational default_value=0 range=(-100 100) clamped=false locked=true
        Coordinate Thigh_Tz: motion_type=translational default_value=0 range=(-100 100) clamped=false locked=true
        SpatialTransform:
          TransformAxis rotation1: coordinates=Hip_rotation axis=(-0.005902593 0.9999688 0.005246494)
              LinearFunction(coefficients=1 0)
          TransformAxis rotation2: coordinates=Hip_flexion axis=(-0.02130297 -0.005371293 0.9997586)
              LinearFunction(coefficients=1 0)
          TransformAxis rotation3: coordinates=Hip_adduction axis=(0.9997556 0.005789475 0.02133391)
              LinearFunction(coefficients=1 0)
          TransformAxis translation1: coordinates=Thigh_Tx axis=(1 0 0) LinearFunction(coefficients=1 0)
          TransformAxis translation2: coordinates=Thigh_Ty axis=(0 1 0) LinearFunction(coefficients=1 0)
          TransformAxis translation3: coordinates=Thigh_Tz axis=(0 0 1) LinearFunction(coefficients=1 0)
      WrapCylinder Quads_at_Femur: xyz_body_rotation=(0.055676 -0.0233874 -2.25968)
          translation=(-0.0009 -0.0137 0.0002) quadrant=y radius=0.001 length=0.003
      WrapEllipsoid Hip_Flexors_at_Quads: xyz_body_rotation=(0.0621337 -0.0350811 0.0120428)
          translation=(-0.0001 -0.0027 0.0016) quadrant=-z dimensions=(0.001 0.003 0.0015)
      WrapEllipsoid TFL_at_Quads: xyz_body_rotation=(0.165632 0.0137881 0.0242601) translation=(-0.0004 -0.0078 0.0014)
          quadrant=all dimensions=(0.0015 0.0035 0.0013)
      WrapEllipsoid AB_at_Quads: xyz_body_rotation=(0.0888373 -0.0354302 0.0492183) translation=(-0.0008 -0.007 0.0001)
          quadrant=all dimensions=(0.001 0.0035 0.001)
      WrapEllipsoid QF_at_Femur: xyz_body_rotation=(0.0816814 0.175929 0.0671952) translation=(-0.0011 -0.0054 0.0014)
          quadrant=-x dimensions=(0.0009 0.004 0.0012)
      WrapCylinder CF_BFA_at_OE: xyz_body_rotation=(1.68669 -0.906349 0.236667) translation=(-0.0027 -0.0016 -0.0002)
          quadrant=y radius=0.0005 length=0.0025
      WrapCylinder QF_at_Thigh: xyz_body_rotation=(1.49051 -0.00907571 -2.17625) translation=(-0.0039 -0.0053 0.0017)
          quadrant=y radius=0.0018 length=0.0075
      WrapEllipsoid CF_BFA_at_Femur: xyz_body_rotation=(2.01062 -0.317824 -1.76575) translation=(-0.001 -0.0008 0.001)
          quadrant=-y dimensions=(0.0018 0.001 0.0015)
      WrapCylinder OI_at_Femur: xyz_body_rotation=(2.91941 0.173137 -0.887325) translation=(-0.0016 -0.0014 0.0005)
          quadrant=-y radius=0.0006 length=0.0025
      WrapEllipsoid PECT_at_Quads: xyz_body_rotation=(-0.00837758 0.0190241 0.0015708)
          translation=(-0.0004 -0.0047 0.0006) quadrant=all dimensions=(0.0006 0.0017 0.0008)
      WrapEllipsoid CF_BFA_at_Thigh: xyz_body_rotation=(-1.60082 -0.0546288 -1.52594)
          translation=(-0.0019 -0.0055 0.0015) quadrant=-y dimensions=(0.0015 0.0005 0.003)
    Body Leg: mass=0.00021645 mass_center=(-0.0008 -0.0072 0) inertia_xx=3.733e-7 inertia_yy=6.8e-7 inertia_zz=4.101e-7
        meshes=(Tibfib.vtp Patella2.vtp)
      CustomJoint Knee: parent_body=Thigh location_in_parent=(0 0 0) location=(0 0 0)
        Coordinate Knee_Ry: motion_type=rotational default_value=0 range=(-3.141593 3.141593) clamped=false locked=true
        Coordinate Knee_extension: motion_type=rotational default_value=-1.521627 range=(-2.530727 0) clamped=false
        Coordinate Knee_Rx: motion_type=rotational default_value=0 range=(-3.141593 3.141593) clamped=false locked=true
        Coordinate Knee_Tx: motion_type=translational default_value=-0.001281 range=(-100 100) clamped=false
            locked=true
        Coordinate Knee_Ty: motion_type=translational default_value=-0.01383 range=(-100 100) clamped=false locked=true
        Coordinate Knee_Tz: motion_type=translational default_value=3.7e-5 range=(-100 100) clamped=false locked=true
        SpatialTransform:
          TransformAxis rotation1: coordinates=Knee_Ry axis=(-1.8095e-7 1 -1.8718e-7) LinearFunction(coefficients=1 0)
          TransformAxis rotation2: coordinates=Knee_extension axis=(-0.00604371 -2.7063e-7 0.9999817)
              LinearFunction(coefficients=1 0)
          TransformAxis rotation3: coordinates=Knee_Rx axis=(0.9999817 -2.7063e-7 0.006042311)
              LinearFunction(coefficients=1 0)
          TransformAxis translation1: coordinates=Knee_Tx axis=(1 0 0) LinearFunction(coefficients=1 0)
          TransformAxis translation2: coordinates=Knee_Ty axis=(0 1 0) LinearFunction(coefficients=1 0)
          TransformAxis translation3: coordinates=Knee_Tz axis=(0 0 1) LinearFunction(coefficients=1 0)
      WrapCylinder Plantarflexors_at_Tibia: xyz_body_rotation=(0.0113446 0.0518363 0.0560251)
          translation=(-0.0011 -0.0029 0) quadrant=-x radius=0.001 length=0.003
      WrapEllipsoid Hip_Ext_at_Gastroc: xyz_body_rotation=(-3.07143 -0.0233874 3.01226)
          translation=(-0.0007 -0.0064 0.0002) quadrant=all dimensions=(0.0025 0.006 0.002)
      WrapCylinder Ankle_Everters_at_Lat_Malleolus: xyz_body_rotation=(-0.0705113 0.0830777 0.145386)
          translation=(-0.0008 -0.0177 0) quadrant=-x radius=0.0008 length=0.0015
      WrapCylinder POP_at_Tibia: xyz_body_rotation=(0.155858 -0.16249 -0.0305433) translation=(-0.0007 -0.0019 0)
          quadrant=-x radius=0.001 length=0.004
      WrapEllipsoid BFPC_at_Leg: xyz_body_rotation=(0.187099 0.191986 -0.0829031) translation=(-0.0013 -0.0057 -0.0005)
          quadrant=z dimensions=(0.0012 0.0038 0.002)
    Body Pedal: mass=6.3e-5 mass_center=(0.0045 -0.0002 0.0001) inertia_xx=6.1e-9 inertia_yy=1.262e-7
        inertia_zz=1.26e-7 meshes=Foot2.vtp
      CustomJoint Ankle: parent_body=Leg location_in_parent=(0 0 0) location=(0 0 0)
        Coordinate Ankle_adduction: motion_type=rotational default_value=0 range=(-0.5235988 0.5235988) clamped=false
        Coordinate Ankle_flexion: motion_type=rotational default_value=-0.120707 range=(-0.8726646 0.8726646)
            clamped=false
        Coordinate Ankle_inversion: motion_type=rotational default_value=0 range=(-0.1745329 0.5235988) clamped=false
        Coordinate Ankle_Tx: motion_type=translational default_value=-0.000901 range=(-100 100) clamped=false
            locked=true
        Coordinate Ankle_Ty: motion_type=translational default_value=-0.01897 range=(-100 100) clamped=false
            locked=true
        Coordinate Ankle_Tz: motion_type=translational default_value=-0.000793 range=(-100 100) clamped=false
            locked=true
        SpatialTransform:
          TransformAxis rotation1: coordinates=Ankle_adduction axis=(-1.3894e-7 1 -1.3851e-7)
              LinearFunction(coefficients=1 0)
          TransformAxis rotation2: coordinates=Ankle_flexion axis=(-0.00267279 2.66079e-7 0.9999964)
              LinearFunction(coefficients=1 0)
          TransformAxis rotation3: coordinates=Ankle_inversion axis=(0.9999964 2.66079e-7 0.00267319)
              LinearFunction(coefficients=1 0)
          TransformAxis translation1: coordinates=Ankle_Tx axis=(1 0 0) LinearFunction(coefficients=1 0)
          TransformAxis translation2: coordinates=Ankle_Ty axis=(0 1 0) LinearFunction(coefficients=1 0)
          TransformAxis translation3: coordinates=Ankle_Tz axis=(0 0 1) LinearFunction(coefficients=1 0)
      WrapCylinder PL_at_Calcaneus: xyz_body_rotation=(1.40272 1.42017 0.729722) translation=(-0.0003 -0.0003 0.0009)
          quadrant=x radius=0.0003 length=0.0021
  ForceSet:
    Millard2012AccelerationMuscle [values shared by the 44 below unless stated]: min_control=0.01 max_control=1
        optimal_force=1
      MuscleFirstOrderActivationDynamicModel:
        activation_time_constant: 0.01 [seconds]
        deactivation_time_constant: 0.04 [seconds]
        minimum_activation: 0
      ActiveForceLengthCurve: min_norm_active_fiber_length=0.4441 transition_norm_fiber_length=0.73
          max_norm_active_fiber_length=1.8123 shallow_ascending_slope=0.8616 minimum_value=0
      ForceVelocityCurve: concentric_slope_at_vmax=0 concentric_slope_near_vmax=0.25 isometric_slope=5
          eccentric_slope_at_vmax=0 eccentric_slope_near_vmax=0.15 max_eccentric_velocity_force_multiplier=1.4
          concentric_curviness=0.6 eccentric_curviness=0.9
      FiberForceLengthCurve
      TendonForceLengthCurve
      FiberCompressiveForceLengthCurve
      FiberCompressiveForceCosPennationCurve
    Millard2012AccelerationMuscle GM_dorsal: max_isometric_force=0.936 optimal_fiber_length=0.01305
        tendon_slack_length=0.00501 pennation_angle_at_optimal=0.3563962 default_fiber_length=0.01305
      PathPoint P1: Pelvis (0.01186 0.00012 -0.00034)
      PathPoint P2: Pelvis (0.00591 0.00014 -0.00066)
      PathPoint P3: Thigh (-0.00036 0.00024 0.00247)
      PathPoint P4: Thigh (-0.00123 -0.00146 0.00211)
    Millard2012AccelerationMuscle GM_mid: max_isometric_force=1.026 optimal_fiber_length=0.01271
        tendon_slack_length=0.00489 pennation_angle_at_optimal=0.3563962 default_fiber_length=0.01271
      PathPoint P1: Pelvis (0.01132 -0.00086 0.00094)
      PathPoint P2: Pelvis (0.00682 -0.00046 -0.00043)
      PathPoint P3: Thigh (-0.00076 0.00016 0.00256)
      PathPoint P4: Thigh (-0.00122 -0.00166 0.0021)
    Millard2012AccelerationMuscle GM_ventral: max_isometric_force=1.049 optimal_fiber_length=0.01242
        tendon_slack_length=0.00478 pennation_angle_at_optimal=0.3563962 default_fiber_length=0.01242
      PathPoint P1: Pelvis (0.01106 -0.00204 -1e-5)
      PathPoint P2: Pelvis (0.00731 -0.00108 -0.0006)
      PathPoint P3: Thigh (-0.00064 -4e-5 0.00257)
      PathPoint P4: Thigh (-0.00104 -0.00185 0.00209)
    Millard2012AccelerationMuscle OE: max_isometric_force=0.086 optimal_fiber_length=0.00246
        tendon_slack_length=0.00096 pennation_angle_at_optimal=0 default_fiber_length=0.00246
      PathPoint P1: Pelvis (-0.00467 -0.00297 -5e-5)
      PathPoint P2: Thigh (-0.00196 -0.00104 1e-5)
      PathWrap: wrap_object=OE_at_Pelvis method=hybrid
    Millard2012AccelerationMuscle OI: max_isometric_force=0.314 optimal_fiber_length=0.00565
        tendon_slack_length=0.00065 pennation_angle_at_optimal=0 default_fiber_length=0.00565
      PathPoint P1: Pelvis (-0.00517 -0.00434 -0.00111)
      PathPoint P2: Thigh (-0.00085 2e-5 0.00026)
      PathWrap: wrap_object=OI_at_Femur method=hybrid
    Millard2012AccelerationMuscle GEM: max_isometric_force=0.179 optimal_fiber_length=0.00143 tendon_slack_length=1e-5
        pennation_angle_at_optimal=0 default_fiber_length=0.00143
      PathPoint P1: Pelvis (-0.00181 0.0011 0.00012)
      PathPoint P2: Thigh (-0.00069 0.00041 0.00069)
    Millard2012AccelerationMuscle QF: max_isometric_force=2.03 optimal_fiber_length=0.00465 tendon_slack_length=0.0011
        pennation_angle_at_optimal=0 default_fiber_length=0.00465
      PathPoint P1: Pelvis (-0.00508 -0.00446 -0.00151)
      PathPoint P2: Thigh (-0.00189 -0.00439 0.00256)
      PathWrap: wrap_object=QF_at_Femur method=hybrid
      PathWrap: wrap_object=QF_at_Thigh method=hybrid
    Millard2012AccelerationMuscle AM: max_isometric_force=0.614 optimal_fiber_length=0.0076 tendon_slack_length=0.00302
        pennation_angle_at_optimal=0 default_fiber_length=0.0076
      PathPoint P1: Pelvis (-0.00217 -0.00212 -0.00198)
      PathPoint P2: Thigh (-0.00167 -0.0124 0.00176)
      PathWrap: wrap_object=GA_at_Pelvis method=hybrid
    Millard2012AccelerationMuscle AL: max_isometric_force=0.402 optimal_fiber_length=0.00745 tendon_slack_length=0.0026
        pennation_angle_at_optimal=0 default_fiber_length=0.00745
      PathPoint P1: Pelvis (-0.00176 -0.00212 -0.00194)
      PathPoint P2: Thigh (-0.00149 -0.01349 -0.00117)
      PathWrap: wrap_object=GA_at_Pelvis method=hybrid
    Millard2012AccelerationMuscle AB: max_isometric_force=0.234 optimal_fiber_length=0.00642 tendon_slack_length=0.0018
        pennation_angle_at_optimal=0 default_fiber_length=0.00642
      PathPoint P1: Pelvis (-0.00165 -0.00201 -0.00212)
      PathPoint P2: Thigh (-0.00083 -0.01045 -7e-5)
      PathWrap: wrap_object=AB_at_Quads method=hybrid
      PathWrap: wrap_object=GA_at_Pelvis method=hybrid
    Millard2012AccelerationMuscle GP: max_isometric_force=0.345 optimal_fiber_length=0.00912 tendon_slack_length=0.0044
        pennation_angle_at_optimal=0 default_fiber_length=0.00912
      PathPoint P1: Pelvis (-0.00441 -0.00311 -0.00032)
      PathPoint P2: Leg (0.00011 -0.00472 -0.00179)
      PathWrap: wrap_object=Hip_Ext_at_Gastroc method=hybrid
      PathWrap: wrap_object=GA_at_Pelvis method=hybrid
    Millard2012AccelerationMuscle GA: max_isometric_force=0.402 optimal_fiber_length=0.00882
        tendon_slack_length=0.00607 pennation_angle_at_optimal=0 default_fiber_length=0.00882
      PathPoint P1: Pelvis (-0.0044 -0.0029 -0.002)
      PathPoint P2: Leg (0.00019 -0.0045 -0.00173)
      PathWrap: wrap_object=GA_at_Pelvis method=hybrid
    Millard2012AccelerationMuscle PMA: max_isometric_force=1.338 optimal_fiber_length=0.00697
        tendon_slack_length=0.00501 pennation_angle_at_optimal=0.2712242 default_fiber_length=0.00697
      PathPoint P1: Pelvis (0.01036 9e-5 -0.00298)
      PathPoint P2: Thigh (-0.00121 -0.00221 0.00028)
      PathWrap: wrap_object=Hip_Flexors_at_Quads method=hybrid
      PathWrap: wrap_object=Hip_flexors_at_pelvis method=hybrid
    Millard2012AccelerationMuscle PMI: max_isometric_force=1.088 optimal_fiber_length=0.00578
        tendon_slack_length=0.0039 pennation_angle_at_optimal=0.2193879 default_fiber_length=0.00578
      PathPoint P1: Pelvis (0.008 -0.00032 -0.0031)
      PathPoint P2: Thigh (-0.00124 -0.00204 0.00022)
      PathWrap: wrap_object=Hip_Flexors_at_Quads method=hybrid
      PathWrap: wrap_object=Hip_flexors_at_pelvis method=hybrid
    Millard2012AccelerationMuscle ILI: max_isometric_force=0.549 optimal_fiber_length=0.00857
        tendon_slack_length=0.00275 pennation_angle_at_optimal=0 default_fiber_length=0.00857
      PathPoint P1: Pelvis (0.01019 -0.00241 -0.00118)
      PathPoint P2: Thigh (-0.00114 -0.00234 0.00037)
      PathWrap: wrap_object=Hip_Flexors_at_Quads method=hybrid
      PathWrap: wrap_object=Hip_flexors_at_pelvis method=hybrid
    Millard2012AccelerationMuscle PECT: max_isometric_force=0.363 optimal_fiber_length=0.00277
        tendon_slack_length=0.00181 pennation_angle_at_optimal=0.264941 default_fiber_length=0.00277
      PathPoint P1: Pelvis (-0.00033 -0.0018 -0.00167)
      PathPoint P2: Thigh (-0.00091 -0.00561 0.00062)
      PathWrap: wrap_object=PECT_at_Quads method=hybrid
    Millard2012AccelerationMuscle TFL: max_isometric_force=0 optimal_fiber_length=1e-7 tendon_slack_length=0
        pennation_angle_at_optimal=0 default_fiber_length=1e-7
      PathPoint P1: Pelvis (0.01095 -0.00227 -0.00026)
      PathPoint P2: Thigh (0.00059 -0.00349 0.00264)
      PathPoint P3: Thigh (-0.00121 -0.011 0.00229)
      PathPoint P4: Leg (-0.00079 -0.00185 0.00133)
    Millard2012AccelerationMuscle CF: max_isometric_force=0.554 optimal_fiber_length=0.01137
        tendon_slack_length=0.00307 pennation_angle_at_optimal=0 default_fiber_length=0.01137
      PathPoint P1: Pelvis (-0.00276 0.00085 0.00085)
      PathPoint P2: Thigh (-0.00234 -0.00792 0.00066)
      PathPoint P3: Thigh (-0.00194 -0.0108 -0.00029)
      PathPoint P4: Thigh (-0.00145 -0.01321 -0.001)
      PathWrap: wrap_object=CF_BFA_at_Thigh method=hybrid
      PathWrap: wrap_object=CF_BFA_at_OE method=hybrid
      PathWrap: wrap_object=CF_BFA_at_Femur method=hybrid
      PathWrap: wrap_object=CF_BFA_at_Pelvis method=hybrid
    Millard2012AccelerationMuscle SM: max_isometric_force=1.916 optimal_fiber_length=0.01165
        tendon_slack_length=0.00409 pennation_angle_at_optimal=0 default_fiber_length=0.01165
      PathPoint P1: Pelvis (-0.00406 -0.00023 0.00133)
      PathPoint P2: Leg (-9e-5 -0.00405 -0.00165)
      PathWrap: wrap_object=Hip_Ext_at_Gastroc method=hybrid
    Millard2012AccelerationMuscle ST: max_isometric_force=1.299 optimal_fiber_length=0.01111 tendon_slack_length=0.0048
        pennation_angle_at_optimal=0 default_fiber_length=0.01111
      PathPoint P1: Pelvis (-0.00569 -0.0012 0.00126)
      PathPoint P2: Leg (0.00015 -0.00607 -0.00172)
      PathWrap: wrap_object=Hip_Ext_at_Gastroc method=hybrid
      PathWrap: wrap_object=ST_at_Pelvis method=hybrid
    Millard2012AccelerationMuscle BFA: max_isometric_force=0.876 optimal_fiber_length=0.01145
        tendon_slack_length=0.00383 pennation_angle_at_optimal=0 default_fiber_length=0.01145
      PathPoint P1: Pelvis (-0.00312 0.00094 0.00105)
      PathPoint P2: Thigh (-0.00182 -0.01341 0.00187)
      PathPoint P3: Thigh (-0.00193 -0.01416 0.00149)
      PathWrap: wrap_object=CF_BFA_at_Thigh method=hybrid
      PathWrap: wrap_object=CF_BFA_at_OE method=hybrid
      PathWrap: wrap_object=CF_BFA_at_Femur method=hybrid
      PathWrap: wrap_object=CF_BFA_at_Pelvis method=hybrid
    Millard2012AccelerationMuscle BFP_cranial: max_isometric_force=0.725 optimal_fiber_length=0.01008
        tendon_slack_length=0.00491 pennation_angle_at_optimal=0 default_fiber_length=0.01008
      PathPoint P1: Pelvis (-0.00353 0.00068 0.00124)
      PathPoint P2: Leg (-0.00104 -0.00157 0.0012)
    Millard2012AccelerationMuscle BFP_mid: max_isometric_force=0.728 optimal_fiber_length=0.01004
        tendon_slack_length=0.0048 pennation_angle_at_optimal=0 default_fiber_length=0.01004
      PathPoint P1: Pelvis (-0.00434 0.00021 0.00145)
      PathPoint P2: Leg (-0.00187 -0.00282 0.00142)
    Millard2012AccelerationMuscle BFP_caudal: max_isometric_force=0.611 optimal_fiber_length=0.01197
        tendon_slack_length=0.00406 pennation_angle_at_optimal=0 default_fiber_length=0.01197
      PathPoint P1: Pelvis (-0.00482 -4e-5 0.00142)
      PathPoint P2: Leg (-0.00027 -0.0055 0.00133)
      PathWrap: wrap_object=BFPC_at_Leg method=hybrid
    Millard2012AccelerationMuscle RF: max_isometric_force=4.162 optimal_fiber_length=0.00534
        tendon_slack_length=0.00853 pennation_angle_at_optimal=0.2773328 default_fiber_length=0.00534
      PathPoint P1: Pelvis (0.00215 -0.00066 0.00028)
      PathPoint P2: Leg (0.00146 0.00072 0.00016)
      PathWrap: wrap_object=Quads_at_Femur method=hybrid
    Millard2012AccelerationMuscle VM: max_isometric_force=1.098 optimal_fiber_length=0.00653
        tendon_slack_length=0.00768 pennation_angle_at_optimal=0.2818707 default_fiber_length=0.00653
      PathPoint P1: Thigh (-0.00029 -0.00053 0.00119)
      PathPoint P2: Leg (0.00128 0.00076 -2e-5)
      PathWrap: wrap_object=Quads_at_Femur method=hybrid
    Millard2012AccelerationMuscle VL: max_isometric_force=2.828 optimal_fiber_length=0.00681
        tendon_slack_length=0.00735 pennation_angle_at_optimal=0.2710496 default_fiber_length=0.00681
      PathPoint P1: Thigh (-0.00038 -0.00062 0.00204)
      PathPoint P2: Leg (0.00128 0.0007 0.0004)
      PathWrap: wrap_object=Quads_at_Femur method=hybrid
    Millard2012AccelerationMuscle VI: max_isometric_force=0.367 optimal_fiber_length=0.00606
        tendon_slack_length=0.00702 pennation_angle_at_optimal=0.19059 default_fiber_length=0.00606
      PathPoint P1: Thigh (-0.00036 -0.00149 0.00146)
      PathPoint P2: Leg (0.00119 0.00073 0.00015)
      PathWrap: wrap_object=Quads_at_Femur method=hybrid
    Millard2012AccelerationMuscle PAT: max_isometric_force=0 optimal_fiber_length=1e-6 tendon_slack_length=0
        pennation_angle_at_optimal=0 default_fiber_length=1e-6
      PathPoint P1: Leg (0.00106 -0.00077 -7e-5)
      PathPoint P2: Leg (0.00096 -0.00176 -0.0002)
    Millard2012AccelerationMuscle POP: max_isometric_force=0.307 optimal_fiber_length=0.00206
        tendon_slack_length=0.00203 pennation_angle_at_optimal=0 default_fiber_length=0.00206
      PathPoint P1: Thigh (-0.00198 -0.01312 0.00122)
      PathPoint P2: Leg (-0.00085 -0.00304 -0.0011)
      PathWrap: wrap_object=POP_at_Tibia method=hybrid
    Millard2012AccelerationMuscle TA: max_isometric_force=2.422 optimal_fiber_length=0.0049 tendon_slack_length=0.0118
        pennation_angle_at_optimal=0.2893756 default_fiber_length=0.0049
      PathPoint P1: Leg (0.00071 -0.0025 -5e-5)
      PathPoint P2: Leg (0.00157 -0.00761 -0.00076)
      PathPoint P3: Leg (0.00029 -0.01152 -0.00042)
      PathPoint P4: Leg (-0.00041 -0.01582 -0.00082)
      PathPoint P5: Leg (-0.00043 -0.01771 -0.00098)
      PathPoint P6: Pedal (0.00084 1e-5 -0.00064)
    Millard2012AccelerationMuscle EDL: max_isometric_force=0.368 optimal_fiber_length=0.00635
        tendon_slack_length=0.02378 pennation_angle_at_optimal=0.2162463 default_fiber_length=0.00635
      PathPoint P1: Leg (-0.00053 -0.00295 0.0016)
      PathPoint P2: Leg (-0.00122 -0.01622 0.00047)
      PathPoint P3: Leg (-0.00085 -0.01821 0.00026)
      PathPoint P4: Pedal (0.00134 -7e-5 0.00027)
      PathPoint P5: Pedal (0.00523 0.00031 0)
      PathPoint P6: Pedal (0.00795 0.00091 -6e-5)
      PathPoint P7: Pedal (0.00949 0.00109 -0.00012)
      PathPoint P8: Pedal (0.01134 0.00045 -0.00017)
      PathPoint P9: Pedal (0.01261 -9e-5 -0.0001)
      PathPoint P10: Pedal (0.01321 -0.00114 -0.00012)
      PathPoint P11: Pedal (0.01337 -0.00172 -0.00015)
      PathPoint P12: Pedal (0.01352 -0.00193 -0.00013)
    Millard2012AccelerationMuscle EHL: max_isometric_force=0.069 optimal_fiber_length=0.00593
        tendon_slack_length=0.01793 pennation_angle_at_optimal=0.1668535 default_fiber_length=0.00593
      PathPoint P1: Leg (0.00045 -0.00418 -0.00042)
      PathPoint P2: Leg (-0.00026 -0.01301 -7e-5)
      PathPoint P3: Leg (-0.0008 -0.01652 -0.00028)
      PathPoint P4: Leg (-0.00067 -0.0177 -0.00031)
      PathPoint P5: Pedal (0.00113 0.00014 -0.00029)
      PathPoint P6: Pedal (0.00256 -0.00051 -0.00106)
      PathPoint P7: Pedal (0.00504 -0.00027 -0.00139)
      PathPoint P8: Pedal (0.0073 0.00023 -0.00182)
      PathPoint P9: Pedal (0.00867 -0.00067 -0.00154)
      PathPoint P10: Pedal (0.00928 -0.00116 -0.00119)
    Millard2012AccelerationMuscle MG: max_isometric_force=1.75 optimal_fiber_length=0.0055 tendon_slack_length=0.01395
        pennation_angle_at_optimal=0.2485349 default_fiber_length=0.0055
      PathPoint P1: Thigh (-0.00162 -0.01279 -0.00078)
      PathPoint P2: Pedal (-0.00205 3e-5 0.00028)
      PathWrap: wrap_object=Plantarflexors_at_Tibia method=hybrid
    Millard2012AccelerationMuscle LG: max_isometric_force=3.784 optimal_fiber_length=0.00541
        tendon_slack_length=0.01389 pennation_angle_at_optimal=0.3015929 default_fiber_length=0.00541
      PathPoint P1: Thigh (-0.00188 -0.01276 0.00115)
      PathPoint P2: Pedal (-0.002 0.0001 0.00069)
      PathWrap: wrap_object=Plantarflexors_at_Tibia method=hybrid
    Millard2012AccelerationMuscle SOL: max_isometric_force=0.591 optimal_fiber_length=0.00316
        tendon_slack_length=0.0074 pennation_angle_at_optimal=0.1994911 default_fiber_length=0.00316
      PathPoint P1: Leg (-0.00199 -0.00813 -0.0003)
      PathPoint P2: Pedal (-0.00183 0.00021 0.00047)
    Millard2012AccelerationMuscle PLANT: max_isometric_force=0.88 optimal_fiber_length=0.00431
        tendon_slack_length=0.01517 pennation_angle_at_optimal=0.2984513 default_fiber_length=0.00431
      PathPoint P1: Thigh (-0.0017 -0.01247 0.00022)
      PathPoint P2: Pedal (-0.00202 0.00015 0.00047)
      PathWrap: wrap_object=Plantarflexors_at_Tibia method=hybrid
    Millard2012AccelerationMuscle FDL: max_isometric_force=1.896 optimal_fiber_length=0.00431
        tendon_slack_length=0.02761 pennation_angle_at_optimal=0.26529 default_fiber_length=0.00431
      PathPoint P1: Leg (-0.0016 -0.00195 -0.00025)
      PathPoint P2: Leg (-0.00177 -0.01914 -0.00115)
      PathPoint P3: Pedal (0.00074 -0.00108 -0.00031)
      PathPoint P4: Pedal (0.00305 -0.00082 -8e-5)
      PathPoint P5: Pedal (0.0066 8e-5 -7e-5)
      PathPoint P6: Pedal (0.00979 0.00029 -0.00017)
      PathPoint P7: Pedal (0.01208 -0.00022 -5e-5)
      PathPoint P8: Pedal (0.01275 -0.00138 -0.00012)
      PathPoint P9: Pedal (0.01325 -0.00204 -0.00012)
    Millard2012AccelerationMuscle TP: max_isometric_force=0.549 optimal_fiber_length=0.00359 tendon_slack_length=0.015
        pennation_angle_at_optimal=0.2694788 default_fiber_length=0.00359
      PathPoint P1: Leg (-0.00149 -0.00213 -0.00069)
      PathPoint P2: Leg (-0.00059 -0.00349 -0.00032)
      PathPoint P3: Leg (-0.00169 -0.01905 -0.00122)
      PathPoint P4: Pedal (0.00065 -0.00088 -0.00096)
    Millard2012AccelerationMuscle PL: max_isometric_force=0.647 optimal_fiber_length=0.00378
        tendon_slack_length=0.01408 pennation_angle_at_optimal=0.2600541 default_fiber_length=0.00378
      PathPoint P1: Leg (-0.00148 -0.00346 0.00161)
      PathPoint P2: Leg (-0.00189 -0.00476 0.00097)
      PathPoint P3: Leg (-0.00125 -0.01624 0.00036)
      PathPoint P4: Pedal (0.00081 -0.00091 0.00094)
      PathPoint P5: Pedal (0.00134 -0.00099 0.00028)
      PathWrap: wrap_object=Ankle_Everters_at_Lat_Malleolus method=hybrid
      PathWrap: wrap_object=PL_at_Calcaneus method=hybrid
    Millard2012AccelerationMuscle PT: max_isometric_force=0.457 optimal_fiber_length=0.00339
        tendon_slack_length=0.01122 pennation_angle_at_optimal=0.217468 default_fiber_length=0.00339
      PathPoint P1: Leg (-0.00193 -0.00502 0.00074)
      PathPoint P2: Leg (-0.00139 -0.01627 0.00021)
      PathPoint P3: Pedal (-0.00011 0.00016 0.00089)
      PathPoint P4: Pedal (0.0006 -0.00017 0.00095)
      PathWrap: wrap_object=Ankle_Everters_at_Lat_Malleolus method=hybrid
    Millard2012AccelerationMuscle PB: max_isometric_force=0.396 optimal_fiber_length=0.00229
        tendon_slack_length=0.01005 pennation_angle_at_optimal=0.2000147 default_fiber_length=0.00229
      PathPoint P1: Leg (-0.00177 -0.00879 -1e-5)
      PathPoint P2: Pedal (-7e-5 0.00028 0.00085)
      PathPoint P3: Pedal (0.00213 -0.00068 0.00101)
      PathWrap: wrap_object=Ankle_Everters_at_Lat_Malleolus method=hybrid
    Millard2012AccelerationMuscle PDQA: max_isometric_force=0.112 optimal_fiber_length=0.00393
        tendon_slack_length=0.02357 pennation_angle_at_optimal=0.2167699 default_fiber_length=0.00393
      PathPoint P1: Leg (-0.00203 -0.00541 0.0006)
      PathPoint P2: Leg (-0.00123 -0.01182 -7e-5)
      PathPoint P3: Pedal (0.00017 0.00023 0.00076)
      PathPoint P4: Pedal (0.00323 -0.00012 0.0008)
      PathPoint P5: Pedal (0.00748 0.00058 0.00102)
      PathPoint P6: Pedal (0.00928 0.00077 0.00117)
      PathPoint P7: Pedal (0.01211 0.0006 0.00096)
      PathPoint P8: Pedal (0.01377 -0.00092 0.00072)
      PathWrap: wrap_object=Ankle_Everters_at_Lat_Malleolus method=hybrid
    Millard2012AccelerationMuscle PDQI: max_isometric_force=0.102 optimal_fiber_length=0.00362
        tendon_slack_length=0.01959 pennation_angle_at_optimal=0.1647591 default_fiber_length=0.00362
      PathPoint P1: Leg (-0.00209 -0.00734 0.00022)
      PathPoint P2: Pedal (0.00067 -5e-5 0.00076)
      PathPoint P3: Pedal (0.00223 -0.00063 0.00116)
      PathPoint P4: Pedal (0.00421 -0.00029 0.00107)
      PathPoint P5: Pedal (0.0072 -0.0002 0.00148)
      PathPoint P6: Pedal (0.01047 -0.00049 0.00111)
      PathPoint P7: Pedal (0.01159 -0.00124 0.00068)
      PathWrap: wrap_object=Ankle_Everters_at_Lat_Malleolus method=hybrid
    CoordinateLimitForce [values shared by the 8 below unless stated]: transition=5 [degrees]
        compute_dissipation_energy=true
    CoordinateLimitForce Pelvic_tilt_LimitForce: coordinate=Pelvic_tilt upper_stiffness=0.1 [N*m/degree]
        upper_limit=32 [degrees] lower_stiffness=0.01 [N*m/degree] lower_limit=10 [degrees] damping=0.0001
    CoordinateLimitForce Hip_rotation_LimitForce: coordinate=Hip_rotation upper_stiffness=1 upper_limit=0.5
        lower_stiffness=1 lower_limit=-0.5 damping=0.0001
    CoordinateLimitForce Hip_flexion_LimitForce: coordinate=Hip_flexion upper_stiffness=0.05 upper_limit=9
        lower_stiffness=0.001 lower_limit=-42 damping=1e-6
    CoordinateLimitForce Hip_adduction_LimitForce: coordinate=Hip_adduction upper_stiffness=0.001 upper_limit=-25
        lower_stiffness=0.001 lower_limit=-40 damping=0.0001
    CoordinateLimitForce Knee_extension_LimitForce: coordinate=Knee_extension upper_stiffness=5e-5 upper_limit=-68
        lower_stiffness=0.0005 lower_limit=-88 damping=1e-6
    CoordinateLimitForce Ankle_inversion_LimitForce: coordinate=Ankle_inversion upper_stiffness=1 upper_limit=1
        lower_stiffness=1 lower_limit=-1 damping=0.001
    CoordinateLimitForce Ankle_adduction_LimitForce: coordinate=Ankle_adduction upper_stiffness=0.1 upper_limit=1
        lower_stiffness=0.001 lower_limit=1 damping=0.001
    CoordinateLimitForce Ankle_flexion_LimitForce: coordinate=Ankle_flexion upper_stiffness=0.0001 upper_limit=36
        lower_stiffness=0.01 lower_limit=-20 damping=1e-8
    ObjectGroup Hip_rotators: members=(GEM GM_dorsal GM_mid GM_ventral OE OI QF TFL)
    ObjectGroup Hip_extensors: members=(BFA BFP_caudal BFP_cranial BFP_mid CF GA GM_dorsal GM_mid GM_ventral GP SM ST)
    ObjectGroup Hip_adductors: members=(AB AL AM GA GP)
    ObjectGroup Knee_flexors: members=(BFA BFP_caudal BFP_cranial BFP_mid GA GP LG MG PLANT POP SM ST)
    ObjectGroup Hip_flexors: members=(ILI PECT PMA PMI)
    ObjectGroup Knee_extensors: members=(PAT RF VI VL VM)
    ObjectGroup Ankle_dorsiflexors: members=(EDL EHL TA)
    ObjectGroup Ankle_plantarflexors: members=(FDL LG MG PB PDQA PDQI PL PLANT PT SOL TP)
    ObjectGroup Ankle_everters: members=(PB PDQA PDQI PL PT)
